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/BATCH
/COM,ANSYS RELEASE Release 16.0      BUILD 16.0      UP20141203       18:34:57
/input,menust,tmp,
/GST,ON
/PLO,INFO,3
/GRO,CURL,ON
*SET,_REMOTE_VIS_ID,'21'
/CPLANE,1
WPSTYLE,,,,,,,,0
/PREP7
finish
/clear
/COM,ANSYS RELEASE Release 16.0      BUILD 16.0      UP20141203       18:54:43
/input,start160,ans,/usr/local/bin/ansys_16/v160/ansys/apdl/
/filename,only998
/prep7
!==============element type
et,1,solid285
!==============material property
mp,ex,1,1e12
mp,prxy,1,0.2
mp,ex,2,1.6e11
mp,prxy,2,0.3
!==============size difine
*SET,r,0.01
*SET,h1,0.005
*SET,h2,0.01
*SET,n,8   !side number
*SET,r_ring,0.015  !
*SET,wd_ring,r
/MPLIB,STAT
csys,1
!===*DO, Par, IVAL, FVAL, INC
*do,i,1,n,1
k,i,r,i*360/n,0
*enddo
csys,0
csys,0
k,n+1,0,0,h1
k,n+2,0,0,-h2
*do,i,1,n-1,1
a,i,i+1,n+1
a,i,i+1,n+2
*enddo
a,1,n,n+1
a,1,n,n+2
APLOT
asel,all
va,all
aplot
vplot
finish
/clear
/COM,ANSYS RELEASE Release 16.0      BUILD 16.0      UP20141203       19:11:21
/input,start160,ans,/usr/local/bin/ansys_16/v160/ansys/apdl/
/filename,only998
/prep7
!==============element type
et,1,solid285
!==============material property
mp,ex,1,1e12
mp,prxy,1,0.2
mp,ex,2,1.6e11
mp,prxy,2,0.3
!==============size difine
*SET,r,0.01
*SET,h1,0.005
*SET,h2,0.01
*SET,n,4   !side number
*SET,r_ring,0.015  !
*SET,wd_ring,r
!==============points
csys,1
!===*DO, Par, IVAL, FVAL, INC
*do,i,1,n,1
k,i,r,i*360/n,0
*enddo
csys,0
k,n+1,0,0,h1
k,n+2,0,0,-h2
!===============areas
*do,i,1,n-1,1
a,i,i+1,n+1
a,i,i+1,n+2
*enddo
a,1,n,n+1
a,1,n,n+2
!===============volu
asel,all
va,all
APLOT
finish
/clear
/COM,ANSYS RELEASE Release 16.0      BUILD 16.0      UP20141203       19:12:17
/input,start160,ans,/usr/local/bin/ansys_16/v160/ansys/apdl/
/filename,only998
/prep7
!==============element type
et,1,solid285
!==============material property
mp,ex,1,1e12
mp,prxy,1,0.2
mp,ex,2,1.6e11
mp,prxy,2,0.3
!==============size difine
*SET,r,0.01
*SET,h1,0.005
*SET,h2,0.01
*SET,n,16   !side number
*SET,r_ring,0.015  !
*SET,wd_ring,r
!==============points
csys,1
!===*DO, Par, IVAL, FVAL, INC
*do,i,1,n,1
k,i,r,i*360/n,0
*enddo
csys,0
k,n+1,0,0,h1
k,n+2,0,0,-h2
!===============areas
*do,i,1,n-1,1
a,i,i+1,n+1
a,i,i+1,n+2
*enddo
a,1,n,n+1
a,1,n,n+2
!===============volu
asel,all
va,all
vplot
block,-r,r,-r,r,h1,h1*0.5
vlist, all
/NUMBER,0
/NUMBER,0
vsbv,1,2
numcmp,all
wpoffs,0,0,-r_ring-h2*0.5
wprota,0,0,90
vplot
cylind,r_ring,0,-wd_ring/2,wdring/2,0,360
finish
/clear
/COM,ANSYS RELEASE Release 16.0      BUILD 16.0      UP20141203       19:27:24
/input,start160,ans,/usr/local/bin/ansys_16/v160/ansys/apdl/
/filename,only998
/prep7
!==============element type
et,1,solid285
!==============material property
mp,ex,1,1e12
mp,prxy,1,0.2
mp,ex,2,1.6e11
mp,prxy,2,0.3
!==============size difine
*SET,r,0.01
*SET,h1,0.005
*SET,h2,0.01
*SET,n,16   !side number
*SET,r_ring,0.015  !
*SET,wd_ring,r
!==============points
csys,1
!===*DO, Par, IVAL, FVAL, INC
*do,i,1,n,1
k,i,r,i*360/n,0
*enddo
csys,0
k,n+1,0,0,h1
k,n+2,0,0,-h2
!===============areas
*do,i,1,n-1,1
a,i,i+1,n+1
a,i,i+1,n+2
*enddo
a,1,n,n+1
a,1,n,n+2
!===============volu
asel,all
va,all
!===============cut
block,-r,r,-r,r,h1,h1*0.5
vsbv,1,2
numcmp,all
!================cut ring
!wp=work plane
wpoffs,0,0,-r_ring-h2*0.5
wprota,0,0,90
cylind,r_ring,0,-wd_ring/2,w_dring/2,0,360
vsbv,1,2,,,keep
numcmp,all
wprota,0,0,-90
wpoffs,0,0,r_ring+h2*0.5
finish
/clear
/COM,ANSYS RELEASE Release 16.0      BUILD 16.0      UP20141203       19:27:54
/input,start160,ans,/usr/local/bin/ansys_16/v160/ansys/apdl/
/filename,only998
/prep7
!==============element type
et,1,solid285
!==============material property
mp,ex,1,1e12
mp,prxy,1,0.2
mp,ex,2,1.6e11
mp,prxy,2,0.3
!==============size difine
*SET,r,0.01
*SET,h1,0.005
*SET,h2,0.01
*SET,n,16   !side number
*SET,r_ring,0.015  !
*SET,wd_ring,r
!==============points
csys,1
!===*DO, Par, IVAL, FVAL, INC
*do,i,1,n,1
k,i,r,i*360/n,0
*enddo
csys,0
k,n+1,0,0,h1
k,n+2,0,0,-h2
!===============areas
*do,i,1,n-1,1
a,i,i+1,n+1
a,i,i+1,n+2
*enddo
a,1,n,n+1
a,1,n,n+2
!===============volu
asel,all
va,all
!===============cut
block,-r,r,-r,r,h1,h1*0.5
vsbv,1,2
numcmp,all
!================cut ring
!wp=work plane
wpoffs,0,0,-r_ring-h2*0.5
wprota,0,0,90
cylind,r_ring,0,-wd_ring/2,wd_ring/2,0,360
vsbv,1,2,,,keep
numcmp,all
wprota,0,0,-90
wpoffs,0,0,r_ring+h2*0.5
vplot
finish
/clear
/COM,ANSYS RELEASE Release 16.0      BUILD 16.0      UP20141203       19:30:27
/input,start160,ans,/usr/local/bin/ansys_16/v160/ansys/apdl/
/filename,only998
/prep7
!==============element type
et,1,solid285
!==============material property
mp,ex,1,1e12
mp,prxy,1,0.2
mp,ex,2,1.6e11
mp,prxy,2,0.3
!==============size difine
*SET,r,0.01
*SET,h1,0.005
*SET,h2,0.01
*SET,n,16   !side number
*SET,r_ring,0.015  !
*SET,wd_ring,r
!==============points
csys,1
!===*DO, Par, IVAL, FVAL, INC
*do,i,1,n,1
k,i,r,i*360/n,0
*enddo
csys,0
k,n+1,0,0,h1
k,n+2,0,0,-h2
!===============areas
*do,i,1,n-1,1
a,i,i+1,n+1
a,i,i+1,n+2
*enddo
a,1,n,n+1
a,1,n,n+2
!===============volu
asel,all
va,all
!===============cut
block,-r,r,-r,r,h1,h1*0.5
vsbv,1,2
numcmp,all
!================cut ring
!wp=work plane
wpoffs,0,0,-r_ring-h2*0.5
wprota,0,0,90
cylind,r_ring,0,-wd_ring/2,wd_ring/2,0,360
vsbv,1,2,,,keep
numcmp,all
cylind,r_ring*0.85,0,-wd_ring/2,wd_ring/2,0,360
vsbv,all,3
numcmp,all
wprota,0,0,-90
wpoffs,0,0,r_ring+h2*0.5
vglue,all
finish
/clear
/COM,ANSYS RELEASE Release 16.0      BUILD 16.0      UP20141203       19:34:53
/input,start160,ans,/usr/local/bin/ansys_16/v160/ansys/apdl/
/filename,only998
/prep7
!==============element type
et,1,solid285
!==============material property
mp,ex,1,1e12
mp,prxy,1,0.2
mp,ex,2,1.6e11
mp,prxy,2,0.3
!==============size difine
*SET,r,0.01
*SET,h1,0.005
*SET,h2,0.01
*SET,n,16   !side number
*SET,r_ring,0.015  !
*SET,wd_ring,r
!==============points
csys,1
!===*DO, Par, IVAL, FVAL, INC
*do,i,1,n,1
k,i,r,i*360/n,0
*enddo
csys,0
k,n+1,0,0,h1
k,n+2,0,0,-h2
!===============areas
*do,i,1,n-1,1
a,i,i+1,n+1
a,i,i+1,n+2
*enddo
a,1,n,n+1
a,1,n,n+2
!===============volu
asel,all
va,all
!===============cut
block,-r,r,-r,r,h1,h1*0.5
vsbv,1,2
numcmp,all
!================cut ring
!wp=work plane
wpoffs,0,0,-r_ring-h2*0.5
wprota,0,0,90
cylind,r_ring,0,-wd_ring/2,wd_ring/2,0,360
vsbv,1,2,,,keep
numcmp,all
cylind,r_ring*0.85,0,-wd_ring/2,wd_ring/2,0,360
vsbv,all,3
numcmp,all
wprota,0,0,-90
wpoffs,0,0,r_ring+h2*0.5
!===============================glue
vglue,all
numcmp,all
!========================mesh
type,1
mat,1
mshkey,0
vmesh,1
alls
type,1
mat,2
mshkey,0
vmesh,2
alls
FINISH
/SOL
nsel,s,loc,z,h1*0.5
d,all,ux,0
d,all,uy,0
d,all,uz,0
alls
nplot
vplot
nplot
! replot
local,11,1,0,0,-r_ring-h2*0.5,0,0,90
csys,11
nplot
nsel,s,loc,x,r_ring*0.85
nplot
nsel,r,loc,y,-20,20
nplot
csys,0
csys,0
sf,all,pres,998
alls
nplot
vplot
nplot
/sol
solve
save
FINISH
/POST1
PLDISP,2
/EFACET,1
PLNSOL, U,Y, 0,1.0
/BATCH
/COM,ANSYS RELEASE Release 16.0      BUILD 16.0      UP20141203       19:54:36
/input,menust,tmp,
/GST,ON
/PLO,INFO,3
/GRO,CURL,ON
*SET,_REMOTE_VIS_ID,'21'
/CPLANE,1
WPSTYLE,,,,,,,,0
finish
/clear
/COM,ANSYS RELEASE Release 16.0      BUILD 16.0      UP20141203       19:54:48
/input,start160,ans,/usr/local/bin/ansys_16/v160/ansys/apdl/
/filename,only998
/prep7
!==============element type
et,1,solid285
!==============material property
mp,ex,1,1e12
mp,prxy,1,0.2
mp,ex,2,1.6e11
mp,prxy,2,0.3
!==============size difine
*SET,r,0.01
*SET,h1,0.005
*SET,h2,0.01
*SET,n,16   !side number
*SET,r_ring,0.015  !
*SET,wd_ring,r
!==============points
csys,1
!===*DO, Par, IVAL, FVAL, INC
*do,i,1,n,1
k,i,r,i*360/n,0
*enddo
csys,0
k,n+1,0,0,h1
k,n+2,0,0,-h2
!===============areas
*do,i,1,n-1,1
a,i,i+1,n+1
a,i,i+1,n+2
*enddo
a,1,n,n+1
a,1,n,n+2
!===============volu
asel,all
va,all
!===============cut
block,-r,r,-r,r,h1,h1*0.5
vsbv,1,2
numcmp,all
!================cut ring
!wp=work plane
wpoffs,0,0,-r_ring-h2*0.5
wprota,0,0,90
cylind,r_ring,0,-wd_ring/2,wd_ring/2,0,360
vsbv,1,2,,,keep
numcmp,all
cylind,r_ring*0.85,0,-wd_ring/2,wd_ring/2,0,360
vsbv,all,3
numcmp,all
wprota,0,0,-90
wpoffs,0,0,r_ring+h2*0.5
!===============================glue
vglue,all
numcmp,all
!========================mesh
type,1
mat,1
mshkey,0
vmesh,1
alls
type,1
mat,2
mshkey,0
vmesh,2
alls
!=================solve
FINISH
/SOL
nsel,s,loc,z,h1*0.5
d,all,ux,0
d,all,uy,0
d,all,uz,0
alls
!=================force
local,11,1,0,0,-r_ring-h2*0.5,0,0,90
csys,11
nsel,s,loc,x,r_ring*0.85
nsel,r,loc,y,-20,20
csys,0
sf,all,pres,998
alls
/sol
solve
save
FINISH
/POST1
/EFACET,1
PLNSOL, U,Z, 0,1.0
FINISH
! /EXI
